// SBML level 3 version 1

function Function_for_reaction_8(IRS_p, IRS_p_phos_by_p70_S6K_pT229_pT389, p70_S6K_pT229_pT389)
  IRS_p_phos_by_p70_S6K_pT229_pT389*IRS_p*p70_S6K_pT229_pT389;
end

function Function_for_reaction_3(Amino_Acids, mTORC2, mTORC2_S2481_phos_by_Amino_Acids)
  mTORC2_S2481_phos_by_Amino_Acids*mTORC2*Amino_Acids;
end

function Function_for_reaction_20(Akt_S473_phos_by_mTORC2_pS2481_second, Akt_pT308, mTORC2_pS2481)
  Akt_S473_phos_by_mTORC2_pS2481_second*Akt_pT308*mTORC2_pS2481;
end

function Function_for_reaction_29(TSC1_TSC2, TSC1_TSC2_pS1387, mTORC1_pS2448, mTORC1_pS2448_dephos_by_TSC1_TSC2)
  mTORC1_pS2448_dephos_by_TSC1_TSC2*mTORC1_pS2448*(TSC1_TSC2 + TSC1_TSC2_pS1387);
end

function Function_for_reaction_33(PI3K_p_PDK1, p70_S6K, p70_S6K_T229_phos_by_PI3K_p_PDK1_first)
  p70_S6K_T229_phos_by_PI3K_p_PDK1_first*p70_S6K*PI3K_p_PDK1;
end

function Function_for_reaction_31(PI3K_variant_p, mTORC2, mTORC2_S2481_phos_by_PI3K_variant_p)
  mTORC2_S2481_phos_by_PI3K_variant_p*mTORC2*PI3K_variant_p;
end

function Function_for_reaction_2(AMPK, AMPK_T172_phos_by_Amino_Acids, Amino_Acids)
  AMPK_T172_phos_by_Amino_Acids*AMPK*Amino_Acids;
end

function Function_for_reaction_4(IR_beta, IR_beta_phos_by_Insulin, Insulin)
  IR_beta_phos_by_Insulin*IR_beta*Insulin;
end

function Function_for_reaction_36(mTORC1_pS2448, p70_S6K_T389_phos_by_mTORC1_pS2448_second, p70_S6K_pT229)
  p70_S6K_T389_phos_by_mTORC1_pS2448_second*p70_S6K_pT229*mTORC1_pS2448;
end

function Function_for_reaction_35(PI3K_p_PDK1, p70_S6K_T229_phos_by_PI3K_p_PDK1_second, p70_S6K_pT389)
  p70_S6K_T229_phos_by_PI3K_p_PDK1_second*p70_S6K_pT389*PI3K_p_PDK1;
end

function Function_for_reaction_26(Akt_pT308, Akt_pT308_pS473, TSC1_TSC2, TSC1_TSC2_T1462_phos_by_Akt_pT308)
  TSC1_TSC2_T1462_phos_by_Akt_pT308*TSC1_TSC2*(Akt_pT308 + Akt_pT308_pS473);
end

function Function_for_reaction_17(Akt, Akt_T308_phos_by_PI3K_p_PDK1_first, PI3K_p_PDK1)
  Akt_T308_phos_by_PI3K_p_PDK1_first*Akt*PI3K_p_PDK1;
end

function Function_for_reaction_44(PRAS40_S183_phos_by_mTORC1_pS2448_second, PRAS40_pT246, mTORC1_pS2448)
  PRAS40_S183_phos_by_mTORC1_pS2448_second*PRAS40_pT246*mTORC1_pS2448;
end

function Function_for_reaction_43(Akt_pT308, Akt_pT308_pS473, PRAS40_T246_phos_by_Akt_pT308_second, PRAS40_pS183)
  PRAS40_T246_phos_by_Akt_pT308_second*PRAS40_pS183*(Akt_pT308 + Akt_pT308_pS473);
end

function Function_for_reaction_9(IRS, IRS_phos_by_p70_S6K_pT229_pT389, p70_S6K_pT229_pT389)
  IRS_phos_by_p70_S6K_pT229_pT389*IRS*p70_S6K_pT229_pT389;
end

function Function_for_reaction_25(AMPK_pT172, TSC1_TSC2, TSC1_TSC2_S1387_phos_by_AMPK_pT172)
  TSC1_TSC2_S1387_phos_by_AMPK_pT172*TSC1_TSC2*AMPK_pT172;
end

function Function_for_reaction_14(IR_beta_pY1146, PI3K_variant, PI3K_variant_phos_by_IR_beta_pY1146)
  PI3K_variant_phos_by_IR_beta_pY1146*PI3K_variant*IR_beta_pY1146;
end

function Function_for_reaction_18(Akt, Akt_S473_phos_by_mTORC2_pS2481_first, mTORC2_pS2481)
  Akt_S473_phos_by_mTORC2_pS2481_first*Akt*mTORC2_pS2481;
end

function Function_for_reaction_30(Amino_Acids, mTORC1, mTORC1_S2448_activation_by_Amino_Acids)
  mTORC1_S2448_activation_by_Amino_Acids*mTORC1*Amino_Acids;
end

function Function_for_reaction_15(AMPK, AMPK_T172_phos, IRS_p)
  AMPK_T172_phos*AMPK*IRS_p;
end

function Function_for_reaction_19(Akt_T308_phos_by_PI3K_p_PDK1_second, Akt_pS473, PI3K_p_PDK1)
  Akt_T308_phos_by_PI3K_p_PDK1_second*Akt_pS473*PI3K_p_PDK1;
end

function Function_for_reaction_12(IRS_p, PI3K_PDK1, PI3K_PDK1_phos_by_IRS_p)
  PI3K_PDK1_phos_by_IRS_p*PI3K_PDK1*IRS_p;
end

function Function_for_reaction_34(mTORC1_pS2448, p70_S6K, p70_S6K_T389_phos_by_mTORC1_pS2448_first)
  p70_S6K_T389_phos_by_mTORC1_pS2448_first*p70_S6K*mTORC1_pS2448;
end

function Function_for_reaction_7(IRS, IRS_phos_by_IR_beta_pY1146, IR_beta_pY1146)
  IRS_phos_by_IR_beta_pY1146*IRS*IR_beta_pY1146;
end

function Function_for_reaction_41(PRAS40, PRAS40_S183_phos_by_mTORC1_pS2448_first, mTORC1_pS2448)
  PRAS40_S183_phos_by_mTORC1_pS2448_first*PRAS40*mTORC1_pS2448;
end

function Function_for_reaction_42(Akt_pT308, Akt_pT308_pS473, PRAS40, PRAS40_T246_phos_by_Akt_pT308_first)
  PRAS40_T246_phos_by_Akt_pT308_first*PRAS40*(Akt_pT308 + Akt_pT308_pS473);
end

function Function_for_reaction_1(Amino_Acids, IRS, IRS_phos_by_Amino_Acids)
  IRS_phos_by_Amino_Acids*IRS*Amino_Acids;
end

model MODEL1702270000()
  // DallePezze2016 - Activation of AMPK and mTOR by amino acids
  // DallePezze2016 - Activation of AMPK and mTOR by amino acids (Model 3)
  // This model is as described in the Supplementary Software 3 of the reference publication: SBML model similar to Model S2, but including a more complex p70-S6K module.
  // This model is described in the article:
  // A systems study reveals concurrent activation of AMPK and mTOR by amino acids.
  // Dalle Pezze P, Ruf S, Sonntag AG, Langelaar-Makkinje M, Hall P, Heberle AM, Razquin Navas P, van Eunen K, Tölle RC, Schwarz JJ, Wiese H, Warscheid B, Deitersen J, Stork B, Fäßler E, Schäuble S, Hahn U, Horvatovich P, Shanley DP, Thedieck K.
  // Nat Commun 2016 Nov; 7: 13254
  // Abstract:
  // Amino acids (aa) are not only building blocks for proteins, but also signalling molecules, with the mammalian target of rapamycin complex 1 (mTORC1) acting as a key mediator. However, little is known about whether aa, independently of mTORC1, activate other kinases of the mTOR signalling network. To delineate aa-stimulated mTOR network dynamics, we here combine a computational-experimental approach with text mining-enhanced quantitative proteomics. We report that AMP-activated protein kinase (AMPK), phosphatidylinositide 3-kinase (PI3K) and mTOR complex 2 (mTORC2) are acutely activated by aa-readdition in an mTORC1-independent manner. AMPK activation by aa is mediated by Ca2+/calmodulin-dependent protein kinase kinase ? (CaMKK?). In response, AMPK impinges on the autophagy regulators Unc-51-like kinase-1 (ULK1) and c-Jun. AMPK is widely recognized as an mTORC1 antagonist that is activated by starvation. We find that aa acutely activate AMPK concurrently with mTOR. We show that AMPK under aa sufficiency acts to sustain autophagy. This may be required to maintain protein homoeostasis and deliver metabolite intermediates for biosynthetic processes.
  // This model is hosted on BioModels Database and identified by: BIOMD0000000640.
  // To cite BioModels Database, please use: BioModels Database: An enhanced, curated and annotated resource for published quantitative kinetic models.
  // To the extent possible under law, all copyright and related or neighbouring rights to this encoded model have been dedicated to the public domain worldwide. Please refer to CC0 Public Domain Dedication for more information.
  // biomodels.db:MODEL1702270000
  // biomodels.db:BIOMD0000000640
  // isDescribedBy pubmed:27869123
  // hasTaxon taxonomy:40674
  // hasProperty GO:0010506 mamo:MAMO_0000046
  // model units - substance: substance, time: time, volume: volume, area: area, length: metre, extent: substance

  // Compartments:
  compartment Cell = 1 volume;  // hasProperty FMA:68646

  // Species:
  species IR_beta in Cell = 50;  // isVersionOf uniprot:P06213
  species IR_beta_pY1146 in Cell = 0;
  species IR_beta_refractory in Cell = 0;
  species IRS in Cell = 150;  // isVersionOf uniprot:P35569
  species IRS_p in Cell = 0;
  species IRS_pS636 in Cell = 0;
  species AMPK in Cell = 50;  // isVersionOf uniprot:Q5EG47
  species AMPK_pT172 in Cell = 0;
  species Akt in Cell = 300;
  species Akt_pT308 in Cell = 0;
  species Akt_pS473 in Cell = 0;
  species Akt_pT308_pS473 in Cell = 0;
  species TSC1_TSC2 in Cell = 50;
  species TSC1_TSC2_pT1462 in Cell = 0;
  species TSC1_TSC2_pS1387 in Cell = 0;
  species mTORC1 in Cell = 100;
  species mTORC1_pS2448 in Cell = 0;
  species mTORC2 in Cell = 100;
  species mTORC2_pS2481 in Cell = 0;
  species p70_S6K in Cell = 300;
  species p70_S6K_pT229 in Cell = 0;
  species p70_S6K_pT389 in Cell = 0;
  species p70_S6K_pT229_pT389 in Cell = 0;
  species PRAS40 in Cell = 20;
  species PRAS40_pT246 in Cell = 0;
  species PRAS40_pS183 in Cell = 0;
  species PRAS40_pT246_pS183 in Cell = 0;
  species PI3K_variant in Cell = 50;
  species PI3K_variant_p in Cell = 0;
  species PI3K_PDK1 in Cell = 50;
  species PI3K_p_PDK1 in Cell = 0;
  species $Insulin in Cell;
  species $Amino_Acids in Cell;
  species $IR_beta_pY1146_obs in Cell;
  species $IRS_pS636_obs in Cell;
  species $AMPK_pT172_obs in Cell;
  species $Akt_pT308_obs in Cell;
  species $Akt_pS473_obs in Cell;
  species $TSC1_TSC2_pS1387_obs in Cell;
  species $mTOR_pS2448_obs in Cell;
  species $mTOR_pS2481_obs in Cell;
  species $p70_S6K_pT229_obs in Cell;
  species $p70_S6K_pT389_obs in Cell;
  species $PRAS40_pT246_obs in Cell;
  species $PRAS40_pS183_obs in Cell;

  // Parameters:
  IRS_phos_by_Amino_Acids = 0.0331672;
  AMPK_T172_phos_by_Amino_Acids = 17.6284;
  mTORC2_S2481_phos_by_Amino_Acids = 0.0268658;
  IR_beta_phos_by_Insulin = 0.0203796;
  IR_beta_pY1146_dephos = 0.493514;
  IR_beta_ready = 323.611;
  IRS_phos_by_IR_beta_pY1146 = 2.11894;
  IRS_p_phos_by_p70_S6K_pT229_pT389 = 0.3388599;
  IRS_phos_by_p70_S6K_pT229_pT389 = 0.08637753;
  IRS_pS636_turnover = 25;
  AMPK_T172_phos = 0.490602;
  AMPK_pT172_dephos = 165.704;
  Akt_S473_phos_by_mTORC2_pS2481_first = 1.31992e-5;
  Akt_S473_phos_by_mTORC2_pS2481_second = 0.159093;
  Akt_T308_phos_by_PI3K_p_PDK1_first = 7.47437;
  Akt_T308_phos_by_PI3K_p_PDK1_second = 7.47345;
  Akt_pT308_dephos_first = 88.9654;
  Akt_pT308_dephos_second = 88.9639;
  Akt_pS473_dephos_first = 0.376999;
  Akt_pS473_dephos_second = 0.380005;
  TSC1_TSC2_S1387_phos_by_AMPK_pT172 = 0.00175772;
  TSC1_TSC2_T1462_phos_by_Akt_pT308 = 1.52417;
  TSC1_TSC2_pS1387_dephos = 0.25319;
  TSC1_TSC2_pT1462_dephos = 147.239;
  mTORC1_pS2448_dephos_by_TSC1_TSC2 = 0.00869774;
  mTORC1_S2448_activation_by_Amino_Acids = 0.0156992;
  mTORC2_pS2481_dephos = 1.42511;
  mTORC2_S2481_phos_by_PI3K_variant_p = 0.120736;
  p70_S6K_T229_phos_by_PI3K_p_PDK1_first = 0.01335202;
  p70_S6K_T229_phos_by_PI3K_p_PDK1_second = 1e-6;
  p70_S6K_T389_phos_by_mTORC1_pS2448_first = 0.002613034;
  p70_S6K_T389_phos_by_mTORC1_pS2448_second = 0.1107209;
  p70_S6K_pT229_dephos_first = 1e-6;
  p70_S6K_pT229_dephos_second = 0.1592014;
  p70_S6K_pT389_dephos_first = 1.100361;
  p70_S6K_pT389_dephos_second = 1.102153;
  PRAS40_S183_phos_by_mTORC1_pS2448_first = 0.15881;
  PRAS40_S183_phos_by_mTORC1_pS2448_second = 0.0683009;
  PRAS40_T246_phos_by_Akt_pT308_first = 0.279344;
  PRAS40_T246_phos_by_Akt_pT308_second = 0.279401;
  PRAS40_pS183_dephos_first = 1.8706;
  PRAS40_pS183_dephos_second = 1.88453;
  PRAS40_pT246_dephos_first = 11.8759;
  PRAS40_pT246_dephos_second = 11.876;
  PI3K_p_PDK1_dephos = 0.1891334;
  PI3K_PDK1_phos_by_IRS_p = 0.0001872268;
  PI3K_variant_p_dephos = 0.1080749;
  PI3K_variant_phos_by_IR_beta_pY1146 = 0.0005490278;
  scale_IR_beta_pY1146_obs = 1;
  scale_IRS_pS636_obs = 1;
  scale_AMPK_pT172_obs = 1;
  scale_Akt_pT308_obs = 1;
  scale_Akt_pS473_obs = 1;
  scale_TSC1_TSC2_pS1387_obs = 1;
  scale_mTOR_pS2448_obs = 1;
  scale_mTOR_pS2481_obs = 1;
  scale_p70_S6K_pT229_obs = 1;
  scale_p70_S6K_pT389_obs = 1;
  scale_PRAS40_pT246_obs = 1;
  scale_PRAS40_pS183_obs = 1;

  // Assignment rules:
  Insulin := piecewise(0, time < 0, 0);
  Amino_Acids := piecewise(0, time < 0, 1);
  IR_beta_pY1146_obs := IR_beta_pY1146;
  IRS_pS636_obs := IRS_pS636;
  AMPK_pT172_obs := AMPK_pT172;
  Akt_pT308_obs := Akt_pT308 + Akt_pT308_pS473;
  Akt_pS473_obs := Akt_pS473 + Akt_pT308_pS473;
  TSC1_TSC2_pS1387_obs := TSC1_TSC2_pS1387;
  mTOR_pS2448_obs := mTORC1_pS2448;
  mTOR_pS2481_obs := mTORC2_pS2481;
  p70_S6K_pT229_obs := p70_S6K_pT229 + p70_S6K_pT229_pT389;
  p70_S6K_pT389_obs := p70_S6K_pT389 + p70_S6K_pT229_pT389;
  PRAS40_pT246_obs := PRAS40_pT246 + PRAS40_pT246_pS183;
  PRAS40_pS183_obs := PRAS40_pS183 + PRAS40_pT246_pS183;

  // Reactions:
  reaction_1: IRS => IRS_p; Cell*Function_for_reaction_1(Amino_Acids, IRS, IRS_phos_by_Amino_Acids);  // modifiers: Amino_Acids
  reaction_2: AMPK => AMPK_pT172; Cell*Function_for_reaction_2(AMPK, AMPK_T172_phos_by_Amino_Acids, Amino_Acids);  // modifiers: Amino_Acids
  reaction_3: mTORC2 => mTORC2_pS2481; Cell*Function_for_reaction_3(Amino_Acids, mTORC2, mTORC2_S2481_phos_by_Amino_Acids);  // modifiers: Amino_Acids
  reaction_4: IR_beta => IR_beta_pY1146; Cell*Function_for_reaction_4(IR_beta, IR_beta_phos_by_Insulin, Insulin);  // modifiers: Insulin
  reaction_5: IR_beta_pY1146 => IR_beta_refractory; Cell*IR_beta_pY1146_dephos*IR_beta_pY1146;
  reaction_6: IR_beta_refractory => IR_beta; Cell*IR_beta_ready*IR_beta_refractory;
  reaction_7: IRS => IRS_p; Cell*Function_for_reaction_7(IRS, IRS_phos_by_IR_beta_pY1146, IR_beta_pY1146);  // modifiers: IR_beta_pY1146
  reaction_8: IRS_p => IRS_pS636; Cell*Function_for_reaction_8(IRS_p, IRS_p_phos_by_p70_S6K_pT229_pT389, p70_S6K_pT229_pT389);  // modifiers: p70_S6K_pT229_pT389
  reaction_9: IRS => IRS_pS636; Cell*Function_for_reaction_9(IRS, IRS_phos_by_p70_S6K_pT229_pT389, p70_S6K_pT229_pT389);  // modifiers: p70_S6K_pT229_pT389
  reaction_10: IRS_pS636 => IRS; Cell*IRS_pS636_turnover*IRS_pS636;
  reaction_11: PI3K_p_PDK1 => PI3K_PDK1; Cell*PI3K_p_PDK1_dephos*PI3K_p_PDK1;
  reaction_12: PI3K_PDK1 => PI3K_p_PDK1; Cell*Function_for_reaction_12(IRS_p, PI3K_PDK1, PI3K_PDK1_phos_by_IRS_p);  // modifiers: IRS_p
  reaction_13: PI3K_variant_p => PI3K_variant; Cell*PI3K_variant_p_dephos*PI3K_variant_p;
  reaction_14: PI3K_variant => PI3K_variant_p; Cell*Function_for_reaction_14(IR_beta_pY1146, PI3K_variant, PI3K_variant_phos_by_IR_beta_pY1146);  // modifiers: IR_beta_pY1146
  reaction_15: AMPK => AMPK_pT172; Cell*Function_for_reaction_15(AMPK, AMPK_T172_phos, IRS_p);  // modifiers: IRS_p
  reaction_16: AMPK_pT172 => AMPK; Cell*AMPK_pT172_dephos*AMPK_pT172;
  reaction_17: Akt => Akt_pT308; Cell*Function_for_reaction_17(Akt, Akt_T308_phos_by_PI3K_p_PDK1_first, PI3K_p_PDK1);  // modifiers: PI3K_p_PDK1
  reaction_18: Akt => Akt_pS473; Cell*Function_for_reaction_18(Akt, Akt_S473_phos_by_mTORC2_pS2481_first, mTORC2_pS2481);  // modifiers: mTORC2_pS2481
  reaction_19: Akt_pS473 => Akt_pT308_pS473; Cell*Function_for_reaction_19(Akt_T308_phos_by_PI3K_p_PDK1_second, Akt_pS473, PI3K_p_PDK1);  // modifiers: PI3K_p_PDK1
  reaction_20: Akt_pT308 => Akt_pT308_pS473; Cell*Function_for_reaction_20(Akt_S473_phos_by_mTORC2_pS2481_second, Akt_pT308, mTORC2_pS2481);  // modifiers: mTORC2_pS2481
  reaction_21: Akt_pT308 => Akt; Cell*Akt_pT308_dephos_first*Akt_pT308;
  reaction_22: Akt_pS473 => Akt; Cell*Akt_pS473_dephos_first*Akt_pS473;
  reaction_23: Akt_pT308_pS473 => Akt_pS473; Cell*Akt_pT308_dephos_second*Akt_pT308_pS473;
  reaction_24: Akt_pT308_pS473 => Akt_pT308; Cell*Akt_pS473_dephos_second*Akt_pT308_pS473;
  reaction_25: TSC1_TSC2 => TSC1_TSC2_pS1387; Cell*Function_for_reaction_25(AMPK_pT172, TSC1_TSC2, TSC1_TSC2_S1387_phos_by_AMPK_pT172);  // modifiers: AMPK_pT172
  reaction_26: TSC1_TSC2 => TSC1_TSC2_pT1462; Cell*Function_for_reaction_26(Akt_pT308, Akt_pT308_pS473, TSC1_TSC2, TSC1_TSC2_T1462_phos_by_Akt_pT308);  // modifiers: Akt_pT308, Akt_pT308_pS473
  reaction_27: TSC1_TSC2_pS1387 => TSC1_TSC2; Cell*TSC1_TSC2_pS1387_dephos*TSC1_TSC2_pS1387;
  reaction_28: TSC1_TSC2_pT1462 => TSC1_TSC2; Cell*TSC1_TSC2_pT1462_dephos*TSC1_TSC2_pT1462;
  reaction_29: mTORC1_pS2448 => mTORC1; Cell*Function_for_reaction_29(TSC1_TSC2, TSC1_TSC2_pS1387, mTORC1_pS2448, mTORC1_pS2448_dephos_by_TSC1_TSC2);  // modifiers: TSC1_TSC2, TSC1_TSC2_pS1387
  reaction_30: mTORC1 => mTORC1_pS2448; Cell*Function_for_reaction_30(Amino_Acids, mTORC1, mTORC1_S2448_activation_by_Amino_Acids);  // modifiers: Amino_Acids
  reaction_31: mTORC2 => mTORC2_pS2481; Cell*Function_for_reaction_31(PI3K_variant_p, mTORC2, mTORC2_S2481_phos_by_PI3K_variant_p);  // modifiers: PI3K_variant_p
  reaction_32: mTORC2_pS2481 => mTORC2; Cell*mTORC2_pS2481_dephos*mTORC2_pS2481;
  reaction_33: p70_S6K => p70_S6K_pT229; Cell*Function_for_reaction_33(PI3K_p_PDK1, p70_S6K, p70_S6K_T229_phos_by_PI3K_p_PDK1_first);  // modifiers: PI3K_p_PDK1
  reaction_34: p70_S6K => p70_S6K_pT389; Cell*Function_for_reaction_34(mTORC1_pS2448, p70_S6K, p70_S6K_T389_phos_by_mTORC1_pS2448_first);  // modifiers: mTORC1_pS2448
  reaction_35: p70_S6K_pT389 => p70_S6K_pT229_pT389; Cell*Function_for_reaction_35(PI3K_p_PDK1, p70_S6K_T229_phos_by_PI3K_p_PDK1_second, p70_S6K_pT389);  // modifiers: PI3K_p_PDK1
  reaction_36: p70_S6K_pT229 => p70_S6K_pT229_pT389; Cell*Function_for_reaction_36(mTORC1_pS2448, p70_S6K_T389_phos_by_mTORC1_pS2448_second, p70_S6K_pT229);  // modifiers: mTORC1_pS2448
  reaction_37: p70_S6K_pT229 => p70_S6K; Cell*p70_S6K_pT229_dephos_first*p70_S6K_pT229;
  reaction_38: p70_S6K_pT389 => p70_S6K; Cell*p70_S6K_pT389_dephos_first*p70_S6K_pT389;
  reaction_39: p70_S6K_pT229_pT389 => p70_S6K_pT389; Cell*p70_S6K_pT229_dephos_second*p70_S6K_pT229_pT389;
  reaction_40: p70_S6K_pT229_pT389 => p70_S6K_pT229; Cell*p70_S6K_pT389_dephos_second*p70_S6K_pT229_pT389;
  reaction_41: PRAS40 => PRAS40_pS183; Cell*Function_for_reaction_41(PRAS40, PRAS40_S183_phos_by_mTORC1_pS2448_first, mTORC1_pS2448);  // modifiers: mTORC1_pS2448
  reaction_42: PRAS40 => PRAS40_pT246; Cell*Function_for_reaction_42(Akt_pT308, Akt_pT308_pS473, PRAS40, PRAS40_T246_phos_by_Akt_pT308_first);  // modifiers: Akt_pT308, Akt_pT308_pS473
  reaction_43: PRAS40_pS183 => PRAS40_pT246_pS183; Cell*Function_for_reaction_43(Akt_pT308, Akt_pT308_pS473, PRAS40_T246_phos_by_Akt_pT308_second, PRAS40_pS183);  // modifiers: Akt_pT308, Akt_pT308_pS473
  reaction_44: PRAS40_pT246 => PRAS40_pT246_pS183; Cell*Function_for_reaction_44(PRAS40_S183_phos_by_mTORC1_pS2448_second, PRAS40_pT246, mTORC1_pS2448);  // modifiers: mTORC1_pS2448
  reaction_45: PRAS40_pS183 => PRAS40; Cell*PRAS40_pS183_dephos_first*PRAS40_pS183;
  reaction_46: PRAS40_pT246 => PRAS40; Cell*PRAS40_pT246_dephos_first*PRAS40_pT246;
  reaction_47: PRAS40_pT246_pS183 => PRAS40_pT246; Cell*PRAS40_pS183_dephos_second*PRAS40_pT246_pS183;
  reaction_48: PRAS40_pT246_pS183 => PRAS40_pS183; Cell*PRAS40_pT246_dephos_second*PRAS40_pT246_pS183;

  // Unit definitions:
  unit volume = dimensionless;
  unit time = 60 second;
  unit substance = dimensionless;
  unit area = metre^2;
end
